# 定义全局变量
p := 10^-12
n := 10^-9
u := 10^-6
m := 10^-3
k := 10^3
# 一、LLC参数定义与计算：
# 1.LLC参数输入输出规格定义：
## :
# 定义直流DC_DC输入电压：
V_in_nom := 400
V_in_max := 420
V_in_min := 370
# 定义直流DC_DC输出电压：
V_out_nom := 96
V_out_max := 115
V_out_min := 83
# 定义额定输出功率：
P_out := 10000
# 2.谐振频率定义：
# 谐振工作频率：
f_r := 100*k
# 谐振工最低频率和最高频率：
f_rmin := 80*k
f_rmax := 200*k
# 3.计算变压器原副变比Nps：
# 定义二极管管压降电压和副边线路上压降之和：
V_D := 0.7
N_ps := V_in_nom/(V_out_nom + V_D*2)
N_ps = 4.10678
# 副边全桥整流结构，有2倍二极管上的压降：
# 4.计算LLC增益曲线：
# 定义H值和Qe值（2kw经验值）：
H := 5.5
Q_e := 0.8
# 计算LLC增益函数：
GAIN(H, Q_e, f_n) := |H*f_n^2/(((H + 1)*f_n^2 - 1) + sqrt(-1)*((f_n^2 - 1)*f_n*Q_e*H))|
# 计算LLC增益曲线：
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# 5.等效负载计算（额定输出功率额定输出电压下）：
R_L := V_out_nom^2/P_out
R_L = 0.9216
# 等效内部电阻：
R_e := 8*N_ps^2/π^2*R_L
R_e = 12.599
# 6.计算LLC谐振参数：
# 计算谐振电容：
C_r := 1/(2*π*Q_e*f_r*R_e)
C_r = 157.905 n
# 计算谐振电感：
L_r := 1/((2*π*f_r)^2*C_r)
L_r = 16.0415 u
# 计算激磁电感：
L_m := H*L_r
L_m = 88.2282 u
# 7.原副边电流计算：
# 计算原边电流最大值与有效值（额定点）：
I_pri_rms := π/(2*sqrt(2))*P_out/V_out_nom/N_ps
I_pri_rms = 28.173
I_pri_max := sqrt(2)*I_pri_rms
I_pri_max = 39.8426
# 计算变压器激磁电流：
I_m_rms := 2*sqrt(2)/π*N_ps*V_out_nom/(2*π*f_r*L_m)
I_m_rms = 6.40295
# 计算谐振电流有效值和峰值（额定点）：
I_r_rms := sqrt(I_m_rms^2 + I_pri_rms^2)
I_r_rms = 28.8914
I_r_peak := sqrt(2)*I_r_rms
I_r_peak = 40.8586
# 计算变压器副边电流：
I_sec_rms := N_ps*I_pri_rms
I_sec_rms = 115.7
# 二、LLC变压器设计与计算：
# 根据功率与电压等级经验选用PQ5050设计LLC变压器：
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# 1.PQ5050磁心相关参数如下：
# 磁心Ae值：
A_e := 363.8*u
# 磁心体积Ve值：
V_e := 41291.3*n
# 磁心平均绕线长度：
l_e := 113.5*m
# 磁心窗口面积：
W_e := 18*m*2*23/2*m = 414 u
# 2.PQ5050磁心计算：
# 定义变压器工作最大Bmax为：
B_max := 150*m
# 计算变压器原边匝数：
n_p := round(V_out_nom*N_ps*1/(f_r*4)/(B_max*A_e))
n_p = 18
# 计算变压器副边匝数：
n_s := round(n_p/N_ps)
n_s = 4
# 计算变压器额定工作点的B：
B := V_out_nom*N_ps*1/(f_r*4)/(n_p*A_e)
B = 150.514 m
# 计算额定工作变压器的磁芯损耗（DMR95厂商数据）：
P_TC := 7.629*10^-8*(B*k)^2.52072*(f_r/k)^1.87872*k*V_e
P_TC = 5.55684
# 3.绕组设计计算：
# 定义变压器原副边绕组工作电流密度：
# 原边绕组电流密度：
I_density_pri := 6*k^2
# 副边绕组电流密度：
I_density_sec := 8*k^2
# 变压器原边采用0.1的多股励磁线绕制，计算励磁线股数：
NTs_pri := ceil(I_pri_rms/(I_density_pri*π*(0.1*m)^2/4*50))*50
NTs_pri = 600  # 变压器副边采用150*0.1的励磁线绕制：
# 变压器副边采用0.1的多股励磁线绕制，计算励磁线股数：
NTs_sec := ceil(I_sec_rms/(I_density_sec*π*(0.1*m)^2/4*50))*50
NTs_sec = 1850  # 变压器副边采用400*0.1的励磁线两组并联绕制：
# 计算窗口占用率（保证在20%以下）：
λ_w := π*(0.1*m)^2/4*(NTs_pri*n_p + NTs_sec*n_s)/W_e
λ_w = 0.345272
# 计算原边绕组直流内阻：
R_dc_pri := 22.5*m*120/NTs_pri*(l_e*n_p + 10*m)
R_dc_pri = 9.2385 m
# 计算副边绕组直流内阻：
R_dc_sec := 22.5*m*120/NTs_sec*(l_e*n_s + 10*m)
R_dc_sec = 0.677189 m
# 定义绕组电流系数：
AC_pri := 2
AC_sec := 2
# 计算变压器绕组损耗：
P_TW := I_pri_rms^2*R_dc_pri*AC_pri + I_sec_rms^2*R_dc_sec*AC_sec
P_TW = 32.7959
# 4.变压器总体损耗计算：
P_T := (P_TC + P_TW)*2 = 76.7055
# 5.变压器气隙计算：
μ0 := 4*π*10^-7
f(g) := g - (μ0*n_p^2*A_e/L_m)*(1 + g/(19.65*m))^2
x := 1*m
g := |root(f(x), x)|
g = 2.04677 m
# 三、LLC谐振电感设计与计算：
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# 根据功率与电压等级经验选用PQ3535设计LLC谐振电感：
# 1.PQ3535磁心相关参数如下：
# 磁心Ae值：
A1_e := 155.4*u
# 磁心体积Ve值：
V1_e := 10645*n
# 磁心平均绕线长度：
l1_e := 64*m
# 磁心窗口面积：
W1_e := 147*u
# 2.PQ3535磁芯计算：
# 定义谐振电感工作最大B1max为：
B1_max := 180*m
# 计算电感绕组匝数：
n_c := ceil(L_r*I_pri_max/(B1_max*A1_e))
n_c = 23
# 计算电感磁芯损耗：
P_LC := 7.629*10^-8*(B1_max*k)^2.52072*(f_r/k)^1.87872*k*V_e
P_LC = 8.72322
# 3.PQ3535电感绕组计算：
# 定义电感绕组工作电流密度：
I_density_r := 6*k^2
# 电感采用0.1的多股励磁线绕制，计算励磁线股数：
NTs_L_r := ceil(I_r_rms/(I_density_r*π*(0.1*m)^2/4*50))*50
NTs_L_r = 650  # 采用0.1*150的多股励磁线绕制：
# 计算窗口占用率（保证小于20%）：
λ_w1 := π*(0.1*m)^2/4*NTs_L_r*n_c/W1_e
λ_w1 = 0.798755
# 计算电感绕组直流内阻：
R_dc_r := 22.5*m*120/NTs_L_r*(l1_e*n_c + 10*m)
R_dc_r = 6.156 m
# 定义绕组电流系数：
AC_r := 2
# 计算变电感绕组损耗：
P_LW := (I_r_rms/2)^2*R_dc_r*AC_r
P_LW = 2.56925
# 4.电感总体损耗计算：
P_L := (P_LW + P_LC)
P_L = 11.2925
# 5.变压器气隙计算：
g1 := μ0*n_c^2*A1_e/(13.8*u)
g1 = 7.48579 m
# 四、LLC原边MOS选型与损耗计算：
# 在该工况下计算满载功率输出时，输入平均电流值：
I_in_avg := P_out/(V_in_nom*0.95) = 26.3158
# 单颗mos的最大电流为谐振电流的最大电流值：
I_mos_max := I_r_peak = 40.8586
# 原边为全桥结构，对于同一个MOS而言，只有一半时间流过电流，计算流经单颗MOS电流的有效值为：
# (谐振工作点近似正弦电流计算）：
I_mos_rms := I_mos_max/(sqrt(2)*2) = 14.4457
# Mos选型的额定电流值需按流过MOS电流的2~3倍余量以上（防止短路或故障下电流过大冲击损坏）
I_mos_rms*3 = 43.3371
# 因为LLC工作于软开关状态，Mos选型的额定耐压值需大于最大电压输入时的耐压值1.3倍余量即可（防止尖峰击穿）
V_in_max*1.3 = 546
# 根据上述计算，可以选取额定电流大于9A，且耐压值大于550V的MOS
# 考虑到散热特性，选择TO247封装，具有较大的散热面积
# LLC软开关工作，可忽略mos的开通损耗，只存在关断损耗和导通损耗：
# 假设查阅datasheet获取MOS在50摄氏度下的Ron与关断能量：
Ron := 37*1.2*m
E_off := 42*u
# 计算mos工作损耗：
P_mos := (2*I_r_rms^2*Ron + 4*f_r*E_off)*1.5
P_mos = 136.384
# 五、LLC副边二极管选型与损耗计算：
# 计算输出最大电流值：
I_dio_max := I_sec_rms*sqrt(2) = 163.625
# 二极管选型的额定电流值需按流过二极管最大电流的2倍余量以上（防止短路或故障下电流过大冲击损坏）
I_sec_rms/2*3 = 173.55
# 二极管截止时，其承受输出两倍的电压,选型确定耐压值1.3倍余量（防止尖峰击穿）
V_DIO := 1.3*V_out_max = 149.5
# 即可选型额定通电能力在35A两颗以上并联，耐压值大于100的快恢二极管。
# 考虑到散热特性，选择TO247封装，具有较大的散热面积
# 考虑最大程度降低降低反向恢复损耗，应选择快恢复型二极管
# 查阅datasheet获取二极管反向结电容：
C_J := 10*n
# 计算二极管工作损耗：
# 二极管导通损耗：
P_dc := 2*0.7*I_sec_rms = 161.98
# 二极反向损耗：
P_dr := 8*0.5*V_out_max^2*C_J*f_r = 52.9
# 二极损耗：
P_d := P_dc + P_dr = 214.88
# 六、LLC输出电容计算：
# 定义额定工况下输出电压纹波为：
V_or := 480*m
# 计算满载输出电流值：
0
I_out := P_out/V_out_nom
104.167
# 计算副边整流电流峰值：
I_opeak := I_sec_rms*sqrt(2) = 163.625
# 计算副边整流电流有效值：
I_orms := I_sec_rms = 115.7
# 计算电容电流有效值：
I_crms := sqrt(I_orms^2 - I_out^2) = 50.3569
# 计算总电容ESR值：
R_ESR := V_or/I_crms = 9.53197 m
# 计算总电容值：
C_out := 60*u/R_ESR = 6.29461 m
# 输出采用560uF的电容，计算总电容颗数：
N_cout := round(C_out/(0.56*m)) + 2 = 13
